C0 lift+cruise VTOL (analysis/aero/avl_run.py from results.json, v0.4.0)
0.0                      | Mach
0 0 0.0                  | iYsym iZsym Zsym
0.68202 0.28418 2.4000   | Sref Cref Bref
0.07957 0.0 0.0000     | Xref Yref Zref (CG, 28 % MAC)
0.0                      | CDp of non-lifting parts: added in drag_buildup.py, not here
#
SURFACE
Wing
16 1.0  30 -1.3          | Nchord Cspace Nspan Sspace (cosine chordwise, tip-clustered spanwise)
YDUPLICATE
0.0
ANGLE
0.0
CDCL
-0.3000 0.01218 0.4000 0.00893 1.1000 0.01471
SECTION
0.0 0.0 0.0 0.28418 0.0  12 1.0
NACA
2415
SECTION
0.0 0.0800 0.0 0.28418 0.0  6 1.0
NACA
2415
SECTION
0.0 0.5840 0.0 0.28418 0.0  14 1.0
NACA
2415
CONTROL
aileron 1.0 0.74 0 0 0 -1.0
SECTION
0.0 1.2000 0.0 0.28418 0.0
NACA
2415
CONTROL
aileron 1.0 0.74 0 0 0 -1.0
#
SURFACE
Htail
10 1.0  16 -1.3
YDUPLICATE
0.0
CDCL
-0.5000 0.01342 0.0000 0.01102 0.5000 0.01342
SECTION
0.81598 0.0 -0.0097 0.10152 0.0
NACA
0009
CONTROL
elevator 1.0 0.70 0 0 0 1.0
SECTION
0.81598 0.4337 -0.0097 0.10152 0.0
NACA
0009
CONTROL
elevator 1.0 0.70 0 0 0 1.0
#
SURFACE
Fin
8 1.0  10 1.0
YDUPLICATE
0.0
CDCL
-0.5000 0.01342 0.0000 0.01102 0.5000 0.01342
SECTION
0.81598 0.4337 -0.0173 0.15968 0.0
NACA
0009
CONTROL
rudder 1.0 0.70 0 0 0 -1.0
SECTION
0.81598 0.4337 0.1823 0.15968 0.0
NACA
0009
CONTROL
rudder 1.0 0.70 0 0 0 -1.0
#
BODY
Pod
24 1.0
BFILE
pod.dat
TRANSLATE
-0.4500 0.0 -0.0300
